<Lems>

    <!--

        This LEMS file has been automatically generated using PyNeuroML v1.3.13 (libNeuroML v0.6.6)

     -->

    <!-- Specify which component to run -->
    <Target component="Sim_IClamp_AIY" reportFile="report.Sim_IClamp_AIY.txt"/>

    <!-- Include core NeuroML2 ComponentType definitions -->
    <Include file="Cells.xml"/>
    <Include file="Networks.xml"/>
    <Include file="Simulation.xml"/>

    <Include file="PyNN.xml"/>
    <Include file="IClamp_AIY.net.nml"/>
    <Include file="AIY.cell.nml"/>

    <Simulation id="Sim_IClamp_AIY" length="11000.0ms" step="0.025ms" target="IClamp_AIY" seed="12345">  <!-- Note seed: ensures same random numbers used every run -->
        <Display id="pop_AIY_0_biophys_membraneProperties_leak_chans_gDensity" title="Plots of pop_AIY_0_biophys_membraneProperties_leak_chans_gDensity" timeScale="1ms" xmin="-1100.0" xmax="12100.000000000002" ymin="-1" ymax="1">
            <Line id="pop_AIY_0_AIY_biophys_membraneProperties_leak_chans_gDensity" quantity="pop_AIY/0/AIY/biophys/membraneProperties/leak_chans/gDensity" scale="1" color="#d54f33" timeScale="1ms"/>
        </Display>

        <Display id="pop_AIY_0_biophys_membraneProperties_leak_chans_iDensity" title="Plots of pop_AIY_0_biophys_membraneProperties_leak_chans_iDensity" timeScale="1ms" xmin="-1100.0" xmax="12100.000000000002" ymin="-1" ymax="1">
            <Line id="pop_AIY_0_AIY_biophys_membraneProperties_leak_chans_iDensity" quantity="pop_AIY/0/AIY/biophys/membraneProperties/leak_chans/iDensity" scale="1" color="#0534e4" timeScale="1ms"/>
        </Display>

        <Display id="pop_AIY_0_caConc" title="Plots of pop_AIY_0_caConc" timeScale="1ms" xmin="-1100.0" xmax="12100.000000000002" ymin="-1" ymax="1">
            <Line id="pop_AIY_0_AIY_caConc" quantity="pop_AIY/0/AIY/caConc" scale="1" color="#98e752" timeScale="1ms"/>
        </Display>

        <Display id="pop_AIY_v" title="Plots of pop_AIY_v" timeScale="1ms" xmin="-1100.0" xmax="12100.000000000002" ymin="-80" ymax="40">
            <Line id="pop_AIY_0_AIY_v" quantity="pop_AIY/0/AIY/v" scale="1mV" color="#bca074" timeScale="1ms"/>
        </Display>

        <OutputFile id="Sim_IClamp_AIY_pop_AIY_v_dat" fileName="Sim_IClamp_AIY.pop_AIY.v.dat">
            <OutputColumn id="pop_AIY_0_AIY_v" quantity="pop_AIY/0/AIY/v"/>
        </OutputFile>

        <OutputFile id="pop_AIY_0_biophys_membraneProperties_leak_chans_gDensity_dat" fileName="pop_AIY_0.biophys_membraneProperties_leak_chans_gDensity.dat">
            <OutputColumn id="pop_AIY_0_AIY_biophys_membraneProperties_leak_chans_gDensity" quantity="pop_AIY/0/AIY/biophys/membraneProperties/leak_chans/gDensity"/>
        </OutputFile>

        <OutputFile id="pop_AIY_0_biophys_membraneProperties_leak_chans_iDensity_dat" fileName="pop_AIY_0.biophys_membraneProperties_leak_chans_iDensity.dat">
            <OutputColumn id="pop_AIY_0_AIY_biophys_membraneProperties_leak_chans_iDensity" quantity="pop_AIY/0/AIY/biophys/membraneProperties/leak_chans/iDensity"/>
        </OutputFile>

        <OutputFile id="pop_AIY_0_caConc_dat" fileName="pop_AIY_0.caConc.dat">
            <OutputColumn id="pop_AIY_0_AIY_caConc" quantity="pop_AIY/0/AIY/caConc"/>
        </OutputFile>

    </Simulation>

</Lems>
